// COMSOL Multiphysics 5.6.0.401 model "Dev2.mph"
// Outline of the model tree

Parameters
  S1 = 8e-9
  Deff = 1e-10
  D = 1
  Ce = 12
  R1 = D/2
  k = 4e-9

Variables
  var1 "Variables 1"
    Sol_analy = 0.25*(S1/Deff)*R2*((r2/R2)-1)+Ce
    R2 = R1*R1
    r2 = r*r
    Test = 0.25*(S1/Deff)*R2*((r2/R2)-1)

Selections
  sel1: Explicit on boundaries 1, 2

Geometry
  geom1 "Geometry 1" (1D axisymmetric, length unit m)
    i1: Interval | coord = {0, R1}
    fin: Finalize "Form Union"

Physics
  tds: DilutedSpecies "Transport of Diluted Species" on all domains
    dependent variable c
    ShapeProperty.order_concentration = 2
    ShapeProperty.boundaryFlux_concentration = 0
    ShapeProperty.boundaryFluxSmooth_concentration = 0
    TransportMechanism.Convection = 0
    MassConsistentStabilization.massStreamlineDiffusion = 1
    MassConsistentStabilization.massCrosswindDiffusion = 0
    cdm1: ConvectionDiffusionMigration "Transport Properties 1" (default) | D_c = Deff
    axi1: AxialSymmetry (default)
    nflx1: NoFlux (default)
    init1: init "Initial Values 1" (default) | initc = 0
    reac1: Reactions (disabled) on domains 1 | R_c = -k*c
    conc1: Concentration on boundaries 2 | species = 1; c0 = Ce
    reac2: Reactions "Reactions-DEV1" on domains 1 | R_c = -S1

Mesh
  mesh1 "Mesh 1"
    size: MeshSizeDefault | hmax = 0.005
    edg1: Edge on remaining entities
  mesh2 "Mesh 2"
    size: MeshSizeDefault | hmax = 0.01
    edg1: Edge on remaining entities
  mesh3 "Mesh 3"
    size: MeshSizeDefault | hmax = 0.02
    edg1: Edge on remaining entities

Studies
  std1 "Fin"
    time: Transient "Time Dependent" | tlist = 10000000; mesh = {geom1, mesh1}
  std2 "Moyen"
    time: Transient "Time Dependent" | tlist = 10000000; mesh = {geom1, mesh2}
  std3 "Grossier"
    time: Transient "Time Dependent" | tlist = 10000000
  std4 "Verification Cas Devoir 1"
    time: Transient "Time Dependent" | tunit = a; tlist = 100; mesh = {geom1, mesh1}

Solver configurations
  sol1 "Solution 1" (study std1)
    v1: Variables "Dependent Variables 1"
    t1: Time "Time-Dependent Solver 1" | tlist = 10000000; rtol = 0.005; maxorder = 2; stabcntrl = on
      fc1: FullyCoupled
        linsolver = d1
        maxiter = 8
        damp = 0.9
        jtech = once
        stabacc = aacc
        aaccdim = 5
        aaccmix = 0.9
        aaccdelay = 1
      d1: Direct "Direct, concentrations (tds)" | linsolver = pardiso; pivotperturb = 1.0E-13
  sol2 "Solution 2" (study std2)
    // same settings as sol1
  sol3 "Solution 3" (study std3)
    // same settings as sol1
  sol4 "Solution 4" (study std4)
    v1: Variables "Dependent Variables 1"
    t1: Time "Time-Dependent Solver 1" | tlist = 100; rtol = 0.005; maxorder = 2; stabcntrl = on
      fc1: FullyCoupled
        linsolver = d1
        maxiter = 8
        damp = 0.9
        jtech = once
        stabacc = aacc
        aaccdim = 5
        aaccmix = 0.9
        aaccdelay = 1
      d1: Direct "Direct, concentrations (tds)" | linsolver = pardiso; pivotperturb = 1.0E-13

Datasets
  dset1: Solution | solution = sol1
  rev1: Revolve1D "Revolution 1D 1" | data = dset1; startangle = -90; revangle = 225
  dset2: Solution | solution = sol2
  rev2: Revolve1D "Revolution 1D 2" | data = dset2; startangle = -90; revangle = 225
  dset3: Solution | solution = sol3
  rev3: Revolve1D "Revolution 1D 3" | data = dset3; startangle = -90; revangle = 225
  dset4: Solution | solution = sol4
  rev4: Revolve1D "Revolution 1D 4" | data = dset4; startangle = -90; revangle = 225

Plots
  pg1: PlotGroup1D "Concentration (tds)"
    data = dset1
    typeintitle = off
    title = Concentration en fonction de r
    xlabel = r [m]
    ylabel = C [mol/m<sup>3</sup>]
    lngr1: LineGraph on all domains | expr = c; xdata = expr; xdataexpr = r
    lngr3: LineGraph (disabled) on domains 1 | data = dset2; expr = c; xdata = expr; xdataexpr = r
    lngr4: LineGraph (disabled) on domains 1 | data = dset3; expr = c; xdata = expr; xdataexpr = r
  pg7: PlotGroup1D "Concentration Dev1"
    data = dset4
    typeintitle = off
    title = Evolution de la concentration selon r pour le régime stationnaire
    xlabel = r[m]
    ylabel = C [mol/m<sup>3</sup>]
    lngr1: LineGraph on all domains | expr = c; xdata = expr; xdataexpr = r; legends = Solution numérique
    lngr5: LineGraph on all domains | expr = Sol_analy

Exports
  data1: Data
    data = dset1
    expr = comp1.c
    filename = C:\Users\benda\OneDrive\Documents\GitHub\MEC8211DEV2\data\10e7_C.txt
    location = grid
    gridx1 = range(0,0.005,0.5)
    regulargridx1 = 100